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# Тепловой расчет
# Исодные данные
# Давление всасывания
p_вс := 3.2*MPa
# Давление нагнетания
p_н := 6.2*MPa
# Температура всасывания
T_вс := 301.15*Δ°C
# Номинальная производительность,
# приведенная к стандартным условиям
V_н := 84480*m^3/hr
# Стандартная температру всасывания
T_с := 293.15*Δ°C
# Стандартное давление всасывания
p_с := 101300*Pa
# Недоохлаждение
ΔT := 7*Δ°C
# Газ - Водород Н2
# Показатель адиабаты
k := 1.41
# Индивидуальная газовая постоянная
R := 4125*J/(kg*K)
# Давление н.у.
p_0 := 101325*Pa
# Температура н.у.
T_0 := 273.15*Δ°C
# Массовый расход
G := p_0*V_н/(R*T_0) = 2.11029 kg/s
# Расчет
# 1. Распределение давления по ступеням
# Общее номенальное относительное повышение давления в компрессоре:
ε_к := p_н/p_вс = 1.9375
# Относительные потери давления в ступени I:
A := 2.66
q := 0.25
# A , q - коэффициенты,учитывающие
# современное газодинамическое совершенство клапанов
δ_вс1 := 0.3*A/(p_вс/(1*Pa))^q explicit, ALL → 0.3*2.66/(3.2*MPa/Pa)^0.25 = 0.0188675
δ_н1 := 0.7*A/(p_н/(1*Pa))^q explicit, ALL → 0.7*2.66/(6.2*MPa/Pa)^0.25 = 0.0373149
# Усредненные давления p1 и p2:
p_1I := (1 - δ_вс1)*p_вс = 3139624 Pa
p_2I := (1 + δ_н1)*p_н = 6431352 Pa
# Номинальное давление:
p_всI := p_вс = 3200000 Pa
p_нI := p_н = 6200000 Pa
# Относительное повышение давления в цилиндрах:
ε_цI := p_2I/p_1I = 2.04845
# 2. Определение коэффициента подачи
# Определение коэффициентов сжимаемости
# Избыточный объем газа
b := 0.6*10^-3*m^3/kg
β := b/(273*R) explicit, ALL → 0.6*10^-3*m^3/kg/(273*4125*J/(kg*K)) = 5.32801e-10 K*m*s^2/kg  # - Показатель отклонения сжимаемости
v_0 := R*T_0/p_0 = 11.1201 m^3/kg
# СТВ I ступени:
T_всI := T_вс = 301.15 K
v_всI := R*(T_всI/p_всI + 273*β) = 0.388801 m^3/kg
ρ_всI := p_всI*v_всI/(p_0*v_0) = 1.10421
ξ_всI := ρ_всI*273/T_вс = 1.001 1/K  # - Коэффициент сжимаемости
# СТН I ступени:
T_нI := T_вс*ε_цI^((k - 1)/k) = 370.97 K
v_нI := R*(T_нI/p_2I + 273*β) = 0.238536 m^3/kg
ρ_нI := p_2I*v_нI/(p_0*v_0) = 1.36154
ξ_нI := ρ_нI*273/T_нI = 1.00197 1/K
m_I := 1.4
# Величина относительного мертвого объема:
a_mI := 0.06
λ_оI := 1 - a_mI*(ξ_всI/ξ_нI*(p_2I/p_всI)^(1/m_I) - 1) = 0.961312
# Коэффициент дросселирования:
Принимаем
λ_дрI := 0.98  # ступень высокого давления
# Коэффициент подогрева:
λ_тI := 1 - 0.01*(ε_цI - 1) = 0.989516
# Коэффициент плотности:
λ_плI := 0.97
# Коэффициенты подачи ступеней:
λ_I := λ_оI*λ_дрI*λ_тI*λ_плI = 0.904242
# 3. Определение основных размеров ступени
# Производительность компрессора, приведенная к условиям всасывания:
V_e := V_н*p_с/T_с*T_вс/p_вс = 0.763139 m^3/s
# Объем, описываемый цилиндром I ступени:
V_hI := V_e/(λ_I*2) = 0.421977 m^3/s
# Частота вращения вала - 490 об/мин
n_0 := 490/(60*s) = 8.16667 1/s  # частота вращение асинхронного электродвигателя
# Средняя скоротсь поршня:
C_m := 3.75*m/s
# Ход поршня:
S_п := C_m/(2*n_0) = 0.229592 m
# Относительный диаметр штока крейцпкофа:
α_шт := 0.15
# Диаметр цилиндра I ступени:
D_I := sqrt(4*V_hI/(π*S_п*n_0*(2 - α_шт^2))) = 0.380663 m
# Округление диаметра по ГОСТ 9515-81:
D_I := 0.38*m
# Диаметр штока:
d_штI := D_I*α_шт = 0.057 m
d_штI := Round(d_штI, 10 mm) = 0.06 m
# Полный ход поршня:
S_п := 4*V_hI/(π*D_I^2*n_0*(2 - α_шт^2)) = 0.230394 m
# Уточнение средней скорости поршня:
C_m := 2*S_п*n_0 = 3.7631 m/s
# Проверка:
S_п*n_0^2 = 15.366 m/s^2
ψ := S_п/D_I = 0.606299
# Уточнение описанных объемов цилиндров:
V_hI := π*D_I^2*(2 - α_шт^2)/4*S_п*n_0 = 0.421977 m^3/s
# Рабочие площади:
F_пI := π*D_I^2/4 = 0.113411 m^2
F_пшI := π*D_I^2*(1 - α_шт^2)/4 = 0.11086 m^2
# Для I поршня:
P_гвI := p_2I*F_пI - (p_1I*F_пшI + p_0*(F_пI - F_пшI)) = 381073 N
P_гнI := p_1I*F_пI - (p_2I*F_пшI + p_0*(F_пI - F_пшI)) = -357167 N
# Построение индикаторных диаграмм:
# Мертвые объемы:
V_мI := V_hI*a_mI = 0.0253186 m^3/s
V_1I := V_мI + V_hI = 0.447296 m^3/s
V_2I := V_1I*(p_1I/p_2I)^(1/k) = 0.268984 m^3/s
V_4I := V_мI*(p_2I/p_1I)^(1/k) = 0.0421026 m^3/s
v := V_мI, 1.01*V_мI .. V_1I
p_Iн(v) :=
    p_1I*(V_1I/v)^k if V_2I ≤ v ≤ V_1I
    p_2I if V_мI < v < V_2I
p_Iв(v) :=
    p_1I*(V_4I/v)^k if V_мI ≤ v ≤ V_4I
    p_1I if V_4I < v ≤ V_1I
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# Мощность привода компрессора
# Коэффициенты возврата энергии:
Θ_I := 1 - a_mI*(ε_цI^(1/k) - 1) = 0.960225
# Определение мощности:
N_индI := p_1I*V_hI*Θ_I*k/(k - 1)*(ε_цI^((k - 1)/k) - 1) = 1014316 W
N_инд.к := 2*N_индI = 2028632 W
η_мех := 0.98
N_e0 := N_инд.к/η_мех = 2070032 W  # мощность на валу компрессора
# Запас по мощности
n_з := 10 %
N_e := N_инд.к/η_мех*(1 + n_з) = 2277036 W  # мощность электродвигателя
# Привод компрессора осуществляется от асинхронного двигателя через упругую муфту.
# Зададимся частотой вращения вала ЭД:
n_0 := 500*min^-1 = 8.33333 1/s
ω_0 := 2*π*n_0 = 52.3599 1/s
M_ном := N_e/ω_0 = 43488.2 J
# Асинхронная частота вращения при заданной нагрузке
n := 490 min^-1
# Динамический расчет
# Исходные данные
# Радиус кривошипа
R_к := S_п/2 = 0.115197 m
# Отношение радиуса кривошипа к длине шатуна
λ_R := 1/5
# Длина шатуна
l_ш := R_к/λ_R = 0.575984 m
ω := 2*π*n_0 = 52.3599 1/s
α := 0, 0.36 deg .. 360 deg
β(α) := asin(λ_R*sin(α))
S_x(α) := R_к*((1 - cos(α)) + λ_R/4*(1 - cos(2*α)))
S_x.1(α) := R_к*(1 - cos(α))
S_x.2(α) := λ_R/4*R_к*(1 - cos(2*α))
C_x(α) := R_к*ω*sin(α + β(α))/cos(β(α))
C_x.1(α) := R_к*ω*sin(α)
C_x.2(α) := R_к*ω*λ_R/2*sin(2*α)
j_x(α) := d/dα(C_x(α))*ω
j_x.1(α) := d/dα(C_x.1(α))*ω
j_x.2(α) := d/dα(C_x.2(α))*ω
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# Рабочий и мертвый обьем цилиндра в основной и крейцкопфной полостях:
V_hIп := S_п*F_пI = 26.1293 L
V_мIп := a_mI*V_hIп = 1.56776 L
V_hIшт := S_п*F_пшI = 25.5414 L
V_мIшт := a_mI*V_hIшт = 1.53248 L
# Связь рабочего объема и перемещения поршня:
V_Iп(α) := V_мIп + S_x(α)*F_пI
V_Iшт(α) := V_hIшт + V_мIшт - S_x(α)*F_пшI
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# Для основной полости I цилиндра:
# Рабочий объем, при котором начинается процесс нагнетания (т.2)
V_n := V_Iп(π)*(p_1I/p_2I)^(1/k) = 16.6558 L
# Рабочий объем, при котором заканчивается процесс обратного расширения (т.4)
V_r := V_Iп(0)*(p_2I/p_1I)^(1/k) = 2.60704 L
ψ := 270 deg
Given
V_Iп(ψ) == V_n
# Процесс нагнетания начинается при угле
ψ := Find(ψ) = 4.65718
φ := 90 deg
Given
V_Iп(φ) == V_r
# Процесс обратного расширения заканчивается при угле
φ := Find(φ) = 0.367193
p_Iп(α) :=
    p_2I*(V_мIп/V_Iп(α))^k if (0 ≤ α ≤ φ) or (2*π ≤ α < 2*π + φ)
    p_1I if (φ ≤ α < π) or (2*π + φ ≤ α < 2*π + π)
    p_1I*((V_hIп + V_мIп)/V_Iп(α))^k if (π ≤ α < ψ) or (2*π + π ≤ α < 2*π + ψ)
    p_2I if (ψ ≤ α < 2*π) or (2*π + ψ ≤ α < 2*π + 2*π)
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# Для крейцкопфной полости I цилиндра:
# Рабочий объем, при котором начинается процесс нагнетания (т.2)
V_n := V_Iшт(0)*(p_1I/p_2I)^(1/k) = 16.281 L
# Рабочий объем, при котором заканчивается процесс обратного расширения (т.4)
V_r := V_Iшт(π)*(p_2I/p_1I)^(1/k) = 2.54838 L
ψ := 90 deg
Given
V_Iшт(ψ) == V_n
# Процесс нагнетания начинается при угле
ψ := Find(ψ) = 1.31947
φ := 270 deg
Given
V_Iшт(φ) == V_r
# Процесс обратного расширения заканчивается при угле
φ := Find(φ) = 3.58854
p_Iшт(α) :=
    p_1I*((V_hIшт + V_мIшт)/V_Iшт(α))^k if (0 ≤ α < ψ) or (2*π ≤ α < 2*π + ψ)
    p_2I if (ψ ≤ α < π) or (2*π + ψ ≤ α < 2*π + π)
    p_2I*(V_мIшт/V_Iшт(α))^k if (π ≤ α < φ) or (2*π + π ≤ α < 2*π + φ)
    p_1I if (φ ≤ α < 2*π) or (2*π + φ ≤ α < 2*π + 2*π)
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# Определение газовых сил, действующих на поршни:
P_гIп(α) := p_Iп(α)*F_пI
P_гIп(0) = 729389 N
P_гIшт(α) := -(p_Iшт(α)*F_пшI + p_0*(F_пI - F_пшI))
P_гIшт(0) = -348316 N
P_гI(α) := P_гIп(α) + P_гIшт(α)
P_гI(0) = 381073 N
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P_гI(0 deg) = 381073 N
P_г.в := P_гI(0 deg)
P_гI(180 deg) = -357167 N
P_г.н := P_гI(180 deg)
P_г.max := max(P_г.в, P_г.н) = 381073 N
# Коэффициент использования механизма движения:
ψ := (P_г.в - P_г.н)/(2*P_г.max) = 0.968634
# Определение массы возвратно-поступательно движущихся частей:
α_пс := 4.0  # учитывает массу кривошипно-шатунного механизма крейкопфного типа
z := 1  # число ступеней в ряду
β_пс := 5.25  # учитывает массу дискового поршня двойного действия
γ := 0.6  # учитывает массу штока
m_пс := 1.02*P_г.max/kN*S_п/m*(α_пс + ψ/z*β_пс + γ)*kg = 867.348 kg
m_пс := Round(m_пс, 1 kg) = 867 kg
# Моменты инерции поступательно движущихся масс:
J_пс(α) := -m_пс*j_x(α)
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# Силы трения в поступательно движущихся парах:
B_тр.псIr := 0.65*N_индI/(2*S_п*n_0)*(1/η_мех - 1) = 3504.06 N
B_тр.псI(α) :=
    (-B_тр.псIr) if (0 ≤ α ≤ π) or (2*π ≤ α ≤ 3*π)
    B_тр.псIr otherwise
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M_кр.трI := 0.35*N_индI/(2*π*n_0)*(1/η_мех - 1) = 138.371 J
# Суммарная сила:
P_ΣI(α) := P_гI(α) + B_тр.псI(α) + J_пс(α)
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# Сила, действующая по шатуну
P_шI(α) := P_ΣI(α)/cos(β(α))
# Нормальные силы, приложенные к крейцкопфу
N_I(α) := -P_ΣI(α)*tan(β(α))
# Тангенциальные силы
T_I(α) := -P_ΣI(α)*sin(α + β(α))/cos(β(α))
# Радиальные силы
Z_I(α) := P_ΣI(α)*cos(α + β(α))/cos(β(α))
# Эквивалентная нагрузка на подшипник I ступени
P_Ie := nthroot(1/(2*π)*integral(|P_шI(α)|^3, α = 0 .. 2*π), 3) = 275216 N
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# Диаграмма крутящих моментов
M_кр1(α) := R_к*T_I(α)
M_кр2(α) := R_к*T_I(α)
M_кр(α) := M_кр1(α) + M_кр2(α)
M_сопр(α) := M_кр(α) + M_кр.трI
M_с.ср := 1/(2*π)*integral(M_сопр(α), α = 0 .. 2*π) = 40189.4 J
N_e0 = 2070032 W
N_e1 := M_с.ср*ω = 2104313 W
ζ := |N_e0 - N_e1|/N_e1 = 1.62905 %
λ(α) := M_сопр(α) - M_с.ср
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# Определим точки, в которых разница ммоентов λ(α) обращается в ноль:
t_1 := root(λ(α), α, 0, 60 deg) = 0.511771
t_2 := root(λ(α), α, 90 deg, 150 deg) = 2.00597
t_3 := root(λ(α), α, 210 deg, 270 deg) = 3.96381
t_4 := root(λ(α), α, 300 deg, 330 deg) = 5.44659
# Соответсвующие площади:
A_1 := integral(λ(α), α = 0 .. t_1) = -12274.3 J
A_2 := integral(λ(α), α = t_1 .. t_2) = 33165.4 J
A_3 := integral(λ(α), α = t_2 .. t_3) = -46165.3 J
A_4 := integral(λ(α), α = t_3 .. t_4) = 47042.1 J
A_5 := integral(λ(α), α = t_4 .. 2*π) = -21769.9 J
A(α) :=
    A_1 if 0 < α ≤ t_1
    (A_1 + A_2) if t_1 < α ≤ t_2
    (A_1 + A_2 + A_3) if t_2 < α ≤ t_3
    (A_1 + A_2 + A_3 + A_4) if t_3 < α ≤ t_4
    (A_1 + A_2 + A_3 + A_4 + A_5) if t_4 < α ≤ 2*π
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A_max := A(300 deg) = 21767.9 J
A_min := A(200 deg) = -25274.2 J
A_Σ := A_max - A_min = 47042.1 J
# Расчет маховика
# Тебуемая степень неавномерсности
# частоты вращения вала
δ := 1/80
# Необходимый момент инерции маховика
J_m := A_Σ/(4*(π*n)^2*δ) = 1429.31 kg*m^2
# Максимально допустимая окружная
# скорость маховика
C_max := 40*m/s
# Максимальный диаметр маховика
D_m.max := C_max/(π*n_0) = 1.52789 m
# Примем наружный диаметр маховика
D_m := 1.5 m
# Толщина маховика
b_m := 200 mm
# Плотность чугуна СЧ20
ρ_ч := 7200*kg/m^3
# Отношение внутреннего диаметра маховика
# к наружнему
φ_m := sqrt(1 - sqrt(32*J_m/(ρ_ч*π*b_m*D_m^4))) = 0.642797i
# Масса маховика
M_m := ρ_ч*π*b_m*D_m^2/4*(1 - φ_m^2) = 3596.13 kg
# Расчет дискового поршня
# I ступень
# Диаметр поршня
D_п := D_I = 0.38 m
# Диаметр штока
d_штI = 0.06 m
# Диаметр втулки штока
d_вт := 2*d_штI = 0.12 m
# Расчет напряжений в днище поршня (по Тимошенко)
# Геометрические параметры
a := D_п/2
b := d_вт/2
# Аспектное соотношение
k_ab := a/b = 3.16667
# Распределенная нагрузка
q := P_г.max/F_пI = 3360090 Pa
# Коэффициент напряжения
# (по таблице)
vx := [3; 4]
vy := [1.54; 2.23]
k_σ := linterp(vx, vy, k_ab) = 1.655
# Допустимое напряжение в днище поршня
σ_доп := 100 MPa
# Минимальная толщина днища поршня
δ_ст.п.min := sqrt(k_σ*q*a^2/σ_доп) = 0.0448052 m
δ_ст.п := Round(δ_ст.п.min, 1 mm) = 0.045 m
# Рекомендуемые диапозоны толщин
0.1*D_п = 0.038 m
0.2*D_п = 0.076 m
# Рабочий зазор между цилиндром и поршнем
ε_p := 0.002
Δ_1p := ε_p*D_I = 0.00076 m
# Расчет поршневых колец
# Максимальный перепад в I ступени
Δ_pI := p_2I - p_1I = 3291728 Pa
# Число уплотняющих колец
n_укI := 3
# Толщина кольца при
D_I = 0.38 m
t_кI := 12 mm
# Высота кольца
b_кI := 12 mm
# Температура всасывания
T_всI = 301.15 K
# Температура нагнетания
T_нI = 370.97 K
# Перепад температур
ΔT_I := T_нI - T_всI = 69.8202 K
# Материал поршневых колец - фторопласт
# Коэффициент линейного расширения
α_фп := 13*10^-5*K^-1
# Предел прочности на разрыв
σ_в.р := 15.7 MPa
# на сжатие
σ_в.с := 21 MPa
# Модуль упругости при сжатии
E := 0.063*10^4*MPa
# Тепловой зазор в замке
a_t := α_фп*ΔT_I*π*D_I = 0.0108357 m
# Опорные кольца
# Максимальное давление от массы
# поршня и 1/2 штока
P_п.доп := 0.25 bar
# Масса поршня и 1/2 штока
m_пш := 1.02*P_г.max/kN*S_п/m*(ψ/z*β_пс + 1/2*γ)*kg = 482.271 kg
# Вес поршня и 1/2 штока
G_пш := m_пш*g = 4729.46 N
# Число опорных колец
Z_ок := 2
# Минимальная высота опорного кольца
b_ок := G_пш/(Z_ок*π*D_I*P_п.доп) = 0.0792334 m
d_клI := 140 mm
# Расстояние от днища поршня
# до опорного кольца
e_к := 15 mm
# Примерная высота поршня
H_пI := 2*(e_к + b_ок + b_кI) + b_кI*(2*n_укI - 1) = 0.272467 m
h_пi := H_пI/D_I = 0.717018
H_пI.max := b_кI*(2*n_укI + 1) + 4/3*b_ок + d_клI = 0.329645 m
H_пI.max + S_п = 0.560038 m
S_п = 0.230394 m
H_пI.max/D_I = 0.867486
# Подбор клапанов по пропускной способности
# Допустимые потери в клапане:
ΔN_Iвс.кл := 7.4 %
ΔN_Iн.кл := 5.8 %
# Скорость звука
a_Iвс := sqrt(k*R*T_всI) = 1323.47 m/s
a_Iн := sqrt(k*R*T_нI) = 1468.9 m/s
# Критерий скорости
F_maxIвс := 0.18
F_maxIн := 0.16
# Скорректированный для водорода критерий скорости
F_wIвс := F_maxIвс*sqrt(1.4/k) = 0.179361
F_wIн := F_maxIн*sqrt(1.4/k) = 0.159432
# Допустимая условная скорость газа
# в клапане
w_фIвс := F_wIвс*a_Iвс = 237.378 m/s
w_фIн := F_wIн*a_Iн = 234.188 m/s
# Число всасывающих или нагнетательных
# клапанов на полость цилиндра
# I ступени
Z_клI := 1
# Необходимое значение эквивалентной площади клапана
Ф_Iвс := F_пI*C_m/(Z_клI*w_фIвс) = 0.00179789 m^2
Ф_Iн := F_пI*C_m/(Z_клI*w_фIн) = 0.00182237 m^2
# Размеры трубопроводов на всасивании и нагнетании I ступени
# Рекомендуемая скорость газа в трубопроводе
w_рек := 14*m/s
# Плотность газа в трубопроводе
ρ_1I := p_вс/(R*T_вс) = 2.57598 kg/m^3
G = 2.11029 kg/s
# Диаметр всасывающего трубопровода
DN_всI := sqrt(2*G/(π*ρ_1I*w_рек)) = 0.193008 m
# Плотность газа в трубопроводе
ρ_2I := p_н/(R*T_нI) = 4.05162 kg/m^3
# Диаметр нагнетающего трубопровода
DN_нI := sqrt(2*G/(π*ρ_2I*w_рек)) = 0.153898 m
# Расчет крейцкопфа
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# Определим максимальную величину сил, действующих на башмак крц
alfa := 270 deg
alfa_max := Maximize(N_I, alfa) = 4.65718
N_I.max := N_I(alfa_max) = 92775.3 N
# Коэффициент длины крейцкопфа
a_крц := 1
# Коэффициент ширины крейцкопфа
b_крц := 0.5
# Допустимое давление на башмак крц (Баббит)
p_крц := 7 MPa
# Минимальный диаметр крц
D_крц := sqrt(N_I.max/(2*a_крц*b_крц*p_крц)) = 0.115124 m
D_крц := 0.350 m
# Длина крц
A_крц := a_крц*D_крц = 0.35 m
# Ширина крц
B_крц := b_крц*D_крц = 0.175 m
S := A_крц + S_п = 0.580394 m
# Палец крейцкопфа
# Определим максимальную нагрузку на палец
alfa := 270 deg
alfa_max := Maximize(P_шI, alfa) = 4.65718
P_шI.max := P_шI(alfa_max) = 464584 N
# Отношение диаметров
α_п := 0.7
# Длина пальца
l_п := B_крц = 0.175 m
# Материал пальца - 40Х
σ_40X := 330 MPa
k_з.п := 2
# Допустимое напряжение при изгибе
σ_доп := σ_40X/k_з.п = 165000000 Pa
# Минимальный диаметр пальца
d_п := nthroot(8*P_шI.max*B_крц/(π*σ_доп*(1 - α_п^4)), 3) = 0.118195 m
# Расчет шатуна
# Длина шатуна
l_ш = 0.575984 m
# Диаметр шатунной шейки
d_шш := 170 mm
# Диаметр пальца
d_п := 120 mm
# Большая головка шатуна
# Высота стягиваемой шатунными болтами части обоймы:
# головки шатуна
h_1 := 0.6*d_шш = 0.102 m
h_1 := 0.1 m
# крышки головки шатуна
h_2 := 0.6*d_шш = 0.102 m
h_2 := 0.1 m
# Диаметр шатунного болта
d_шб := 0.24*d_шш = 0.0408 m
# Расстояние между шатунными болтами
C_б := 1.25*d_шш = 0.2125 m
C_б := 210 mm
# Ширина обоймы шатуна
B_ш := C_б + d_шб = 0.2508 m
# Малая головка шатуна
# Наружний диаметр головки
d_г := 1.5*d_п = 0.18 m
# Длина головки шатуна
l_г := 0.32*D_крц = 0.112 m
# Минимальная толщина стенки головки
h_г := 0.3*d_п = 0.036 m
# Радиальная толщина втулки
s_вт := 0.09*d_п = 0.0108 m
# Стержень шатуна
# Длина шатуна
l_ш = 0.575984 m
# Минимальная ширина стержня шатуна
h_ш.min := 0.6*d_г = 0.108 m
# Максимальная ширина стержня шатуна
h_ш.max := 1.4*h_ш.min = 0.1512 m
# Размер полок двутавра шатуна
b_ш := 0.8*h_ш.min = 0.0864 m
1.5*d_шш = 0.255 m
